*Heading

** Job name: abaqus_meshfile Model name: Model-1

** Generated by: Sunil Bhandari

*Preprint, echo=NO, model=NO, history=NO, contact=NO

**

** PARTS

**

*Part, name=Part-1

*End Part

**

**

** ASSEMBLY

**

*Assembly, name=Assembly

**

*Instance, name=Part-1-1, part=Part-1

*Node
1,0.13960044067796612,0.1164,0.0004
2,0.1404005593220339,0.1164,0.0004
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*Element, type=DC3D8
1,1,2,4,3,5,6,8,7
2,2,9,10,4,6,11,12,8
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*Nset, nset=Set-1, generate
    1,  42888,     1
 *Elset, elset=Set-1, generate
  1,  33839,   1
** Section: Section-1
*Solid Section, elset=Set-1, material=Material-1
,
*End Instance
**
*ELEMENT PROGRESSIVE ACTIVATION, NAME = "EPA", ELSET = PART-1-1.SET-1
*End Assembly
**
** MATERIALS
**
*Material, name=Material-1
*Density
1240,
*Conductivity
 0.33,
*Specific Heat
2020.,

** ----------------------------------------------------------------
**
** STEP: Step-1
**
*Step, name=Step-1, nlgeom=NO, inc=1000
*Heat Transfer, end=PERIOD
1., 100, , ,
